<?xml version="1.0"?>

<aerodynamics>
	<axis name="LIFT">
	</axis>

	<axis name="DRAG">
		<function name="aero/force/drag">
			<description>Drag</description>
			<product>
				<property>aero/qbar-psf</property>
				<value>10.76</value>
				<value>1.0</value>
			</product>
		</function>
	</axis>

	<axis name="SIDE">
	</axis>

	<axis name="ROLL">
		<function name="aero/force/rolldamp">
			<description>Roll_moment_due_to_roll_rate_(roll_damping)</description>
			<product>
				<property>velocities/p-aero-rad_sec</property>
				<value>-0.002</value>
			</product>
		</function>
	</axis>

	<axis name="PITCH">
		<function name="aero/force/pitchdamp">
			<description>Pitch_moment_due_to_pitch_rate</description>
			<product>
				<property>velocities/q-aero-rad_sec</property>
				<value>-0.001</value>
			</product>
		</function>
	</axis>

	<axis name="YAW">
		<function name="aero/force/yawdamp">
			<description>Yaw_moment_due_to_yaw_rate</description>
			<product>
				<property>velocities/r-aero-rad_sec</property>
				<value>-0.001</value>
			</product>
		</function>
	</axis>

</aerodynamics>
