<?xml version="1.0"?>
<?xml-stylesheet type="text/xsl" href="http://jsbsim.sourceforge.net/JSBSim.xsl"?>
<fdm_config xmlns:xsi="http://www.w3.org/2001/XMLSchema-instance" xsi:noNamespaceSchemaLocation="http://jsbsim.sourceforge.net/JSBSim.xsd"
		name="kentavros" version="2.0" release="ALPHA">

<fileheader>
	<author>Aleksandr Malikov</author>
	<filecreationdate>2018-07-14</filecreationdate>
	<version>$Revision: 1.0 $</version>
	<description>Kentavros</description>
</fileheader>

<metrics>
	<wingarea  unit="M2">   0.8 </wingarea>
	<wingspan  unit="M" >   3.0 </wingspan>
	<wing_incidence>        0.1 </wing_incidence>
	<chord     unit="M" >   0.3 </chord>
	<htailarea unit="FT2">  1.0 </htailarea>
	<htailarm  unit="FT" >  0.1 </htailarm>
	<vtailarea unit="FT2">  1.0 </vtailarea>
	<vtailarm  unit="FT" >  0.1 </vtailarm>
	<location name="AERORP" unit="M">
		<x> 0.99</x>
		<y> 0</y>
		<z> 0</z>
	</location>
	<location name="EYEPOINT" unit="M">
		<x> 0.99</x>
		<y> 0.0</y>
		<z> 0.0</z>
	</location>
	<location name="VRP" unit="M">
		<x> 0</x>
		<y> 0</y>
		<z> 0</z>
	</location>
</metrics>

<mass_balance>
	<ixx unit="KG*M2"> 7.26</ixx> <!--  7.26 plane,  7.73 plane+stand -->
	<ixy unit="KG*M2"> 0.05</ixy>
	<ixz unit="KG*M2"> 1.69</ixz>
	<iyy unit="KG*M2">17.63</iyy> <!-- 17.63 plane, 18.09 plane+stand -->
	<iyz unit="KG*M2"> 0.01</iyz>
	<izz unit="KG*M2">23.81</izz> <!-- 23.81 plane, 24.73 plane+stand -->
	<emptywt unit="KG">34.90</emptywt>
	<location name="CG" unit="M">
		<x> 0.99</x>
		<y> 0</y>
		<z> 0</z>
	</location>
</mass_balance>


<!-- ************************** GROUND REACTIONS *************************** -->
<ground_reactions>
	<contact type="STRUCTURE" name="gear.nose">
		<location unit="M">
			<x> 0.049</x>
			<y> 0.000</y>
			<z>-0.224</z>
		</location>
		<static_friction>0.80</static_friction>
		<dynamic_friction>0.50</dynamic_friction>
		<spring_coeff unit="LBS/FT">5000</spring_coeff>
		<damping_coeff unit="LBS/FT/SEC">100</damping_coeff>
	</contact>

	<contact type="STRUCTURE" name="gear.main.l">
		<location unit="M">
			<x> 1.291</x>
			<y>-0.381</y>
			<z>-0.238</z>
		</location>
		<static_friction>0.80</static_friction>
		<dynamic_friction>0.50</dynamic_friction>
		<spring_coeff unit="LBS/FT">5000</spring_coeff>
		<damping_coeff unit="LBS/FT/SEC">100</damping_coeff>
	</contact>

	<contact type="STRUCTURE" name="gear.main.r">
		<location unit="M">
			<x> 1.291</x>
			<y> 0.381</y>
			<z>-0.238</z>
		</location>
		<static_friction>0.80</static_friction>
		<dynamic_friction>0.50</dynamic_friction>
		<spring_coeff unit="LBS/FT">5000</spring_coeff>
		<damping_coeff unit="LBS/FT/SEC">100</damping_coeff>
	</contact>

	<contact type="STRUCTURE" name="nacelle.fl">
		<location unit="M">
			<x> 0.317</x>
			<y>-0.799</y>
			<z>-0.129</z>
		</location>
		<static_friction>0.80</static_friction>
		<dynamic_friction>0.50</dynamic_friction>
		<spring_coeff unit="LBS/FT">5000</spring_coeff>
		<damping_coeff unit="LBS/FT/SEC">100</damping_coeff>
	</contact>

	<contact type="STRUCTURE" name="nacelle.fr">
		<location unit="M">
			<x> 0.317</x>
			<y> 0.799</y>
			<z>-0.129</z>
		</location>
		<static_friction>0.80</static_friction>
		<dynamic_friction>0.50</dynamic_friction>
		<spring_coeff unit="LBS/FT">5000</spring_coeff>
		<damping_coeff unit="LBS/FT/SEC">100</damping_coeff>
	</contact>

	<contact type="STRUCTURE" name="nacelle.rl">
		<location unit="M">
			<x> 2.083</x>
			<y>-0.568</y>
			<z>-0.090</z>
		</location>
		<static_friction>0.80</static_friction>
		<dynamic_friction>0.50</dynamic_friction>
		<spring_coeff unit="LBS/FT">5000</spring_coeff>
		<damping_coeff unit="LBS/FT/SEC">100</damping_coeff>
	</contact>

	<contact type="STRUCTURE" name="nacelle.rr">
		<location unit="M">
			<x> 2.083</x>
			<y> 0.568</y>
			<z>-0.090</z>
		</location>
		<static_friction>0.80</static_friction>
		<dynamic_friction>0.50</dynamic_friction>
		<spring_coeff unit="LBS/FT">5000</spring_coeff>
		<damping_coeff unit="LBS/FT/SEC">100</damping_coeff>
	</contact>

	<contact type="STRUCTURE" name="body.wing.l">
		<location unit="M">
			<x> 1.545</x>
			<y>-1.365</y>
			<z> 0.031</z>
		</location>
		<static_friction>0.80</static_friction>
		<dynamic_friction>0.50</dynamic_friction>
		<spring_coeff unit="LBS/FT">5000</spring_coeff>
		<damping_coeff unit="LBS/FT/SEC">100</damping_coeff>
	</contact>

	<contact type="STRUCTURE" name="body.wing.r">
		<location unit="M">
			<x> 1.545</x>
			<y> 1.365</y>
			<z> 0.031</z>
		</location>
		<static_friction>0.80</static_friction>
		<dynamic_friction>0.50</dynamic_friction>
		<spring_coeff unit="LBS/FT">5000</spring_coeff>
		<damping_coeff unit="LBS/FT/SEC">100</damping_coeff>
	</contact>

	<contact type="STRUCTURE" name="body.tail">
		<location unit="M">
			<x> 2.115</x>
			<y> 0.000</y>
			<z> 0.601</z>
		</location>
		<static_friction>0.80</static_friction>
		<dynamic_friction>0.50</dynamic_friction>
		<spring_coeff unit="LBS/FT">5000</spring_coeff>
		<damping_coeff unit="LBS/FT/SEC">100</damping_coeff>
	</contact>

	<contact type="STRUCTURE" name="body.tail">
		<location unit="M">
			<x> 0.547</x>
			<y> 0.000</y>
			<z> 0.170</z>
		</location>
		<static_friction>0.80</static_friction>
		<dynamic_friction>0.50</dynamic_friction>
		<spring_coeff unit="LBS/FT">5000</spring_coeff>
		<damping_coeff unit="LBS/FT/SEC">100</damping_coeff>
	</contact>

	<contact type="STRUCTURE" name="body.nose">
		<location unit="M">
			<x> 0.000</x>
			<y> 0.000</y>
			<z> 0.000</z>
		</location>
		<static_friction>0.80</static_friction>
		<dynamic_friction>0.50</dynamic_friction>
		<spring_coeff unit="LBS/FT">5000</spring_coeff>
		<damping_coeff unit="LBS/FT/SEC">100</damping_coeff>
	</contact>

</ground_reactions>


<!-- ****************************** PROPULSION ***************************** -->
<propulsion>
	<engine file="xm9025hd-6"> 		<!-- ESC 1: front right, CCW -->
		<location unit="M">
			<x> 0.312</x>
			<y> 0.749</y>
			<z> 0.054</z>
		</location>
		<orient unit="DEG">
			<pitch> 0</pitch>
			<roll>  0</roll>
			<yaw>   0</yaw>
		</orient>
		<thruster file="xoar-29x9.5">
			<sense>1</sense>
			<location unit="M">
				<x> 0.312</x>
				<y> 0.749</y>
				<z> 0.054</z>
			</location>
			<orient unit="DEG">
				<pitch> 90</pitch>
				<roll>   0</roll>
				<yaw>    0</yaw>
			</orient>
		</thruster>
	</engine>

	<engine file="xm9025hd-6"> 		<!-- ESC 2: rear left, CCW -->
		<location unit="M">
			<x> 2.077</x>
			<y>-0.518</y>
			<z> 0.093</z>
		</location>
		<orient unit="DEG">
			<pitch> 0</pitch>
			<roll>  0</roll>
			<yaw>   0</yaw>
		</orient>
		<thruster file="xoar-26x14">
			<sense>1</sense>
			<location unit="M">
				<x> 2.077</x>
				<y>-0.518</y>
				<z> 0.093</z>
			</location>
			<orient unit="DEG">
				<pitch> 90</pitch>
				<roll>   0</roll>
				<yaw>    0</yaw>
			</orient>
		</thruster>
	</engine>

	<engine file="xm9025hd-6"> 		<!-- ESC 3: front left, CW -->
		<location unit="M">
			<x> 0.312</x>
			<y>-0.749</y>
			<z> 0.054</z>
		</location>
		<orient unit="DEG">
			<pitch> 0</pitch>
			<roll>  0</roll>
			<yaw>   0</yaw>
		</orient>
		<thruster file="xoar-29x9.5">
			<sense>-1</sense>
			<location unit="M">
				<x> 0.312</x>
				<y>-0.749</y>
				<z> 0.054</z>
			</location>
			<orient unit="DEG">
				<pitch> 90</pitch>
				<roll>   0</roll>
				<yaw>    0</yaw>
			</orient>
		</thruster>
	</engine>

	<engine file="xm9025hd-6"> 		<!-- ESC 4: rear right, CW -->
		<location unit="M">
			<x> 2.077</x>
			<y> 0.518</y>
			<z> 0.093</z>
		</location>
		<orient unit="DEG">
			<pitch> 0</pitch>
			<roll>  0</roll>
			<yaw>   0</yaw>
		</orient>
		<thruster file="xoar-26x14">
			<sense>-1</sense>
			<location unit="M">
				<x> 2.077</x>
				<y> 0.518</y>
				<z> 0.093</z>
			</location>
			<orient unit="DEG">
				<pitch> 90</pitch>
				<roll>   0</roll>
				<yaw>    0</yaw>
			</orient>
		</thruster>
	</engine>
</propulsion>


<!-- *************************** CONTROLS ********************************** -->
<flight_control name="FCS: kentavros">
	<!--channel name="Thrust">
		<fcs_function name="fcs/throttle-cmd-sqrt">
			<function>
				<product>
					<property>fcs/throttle-cmd-norm</property>
					<property>fcs/throttle-cmd-norm</property>
				</product>
			</function>
			<output>fcs/throttle-pos-norm</output>
		</fcs_function>
		<fcs_function name="fcs/throttle-cmd-sqrt[1]">
			<function>
				<product>
					<property>fcs/throttle-cmd-norm[1]</property>
					<property>fcs/throttle-cmd-norm[1]</property>
				</product>
			</function>
			<output>fcs/throttle-pos-norm[1]</output>
		</fcs_function>
		<fcs_function name="fcs/throttle-cmd-sqrt[2]">
			<function>
				<product>
					<property>fcs/throttle-cmd-norm[2]</property>
					<property>fcs/throttle-cmd-norm[2]</property>
				</product>
			</function>
			<output>fcs/throttle-pos-norm[2]</output>
		</fcs_function>
		<fcs_function name="fcs/throttle-cmd-sqrt[3]">
			<function>
				<product>
					<property>fcs/throttle-cmd-norm[3]</property>
					<property>fcs/throttle-cmd-norm[3]</property>
				</product>
			</function>
			<output>fcs/throttle-pos-norm[3]</output>
		</fcs_function>
	</channel-->

	<channel name="Yaw">
		<kinematic name="fcs/nacelle-cmd-norm-filtered">
			<input>fcs/nacelle-cmd-norm</input>
			<traverse>
				<setting>
					<position>0</position>
					<time>0</time>
				</setting>
				<setting>
					<position>1</position>
					<time>0.2</time>
				</setting>
			</traverse>
		</kinematic>

		<aerosurface_scale name="fcs/nacelle-angle-rad">
			<input>fcs/nacelle-cmd-norm-filtered</input>
			<zero_centered>false</zero_centered>
			<domain>
				<min>0</min>
				<max>1</max>
			</domain>
			<range>
				<min>1.65</min>
				<max>0.08</max>
			</range>
			<output>propulsion/engine/pitch-angle-rad</output>
		</aerosurface_scale>

		<kinematic name="fcs/nacelle-cmd-norm-filtered[1]">
			<input>fcs/nacelle-cmd-norm[1]</input>
			<traverse>
				<setting>
					<position>0</position>
					<time>0</time>
				</setting>
				<setting>
					<position>1</position>
					<time>0.2</time>
				</setting>
			</traverse>
		</kinematic>

		<aerosurface_scale name="fcs/nacelle-angle-rad[1]">
			<input>fcs/nacelle-cmd-norm-filtered[1]</input>
			<zero_centered>false</zero_centered>
			<domain>
				<min>0</min>
				<max>1</max>
			</domain>
			<range>
				<min>1.65</min>
				<max>0.08</max>
			</range>
			<output>propulsion/engine[1]/pitch-angle-rad</output>
		</aerosurface_scale>

		<kinematic name="fcs/nacelle-cmd-norm-filtered[2]">
			<input>fcs/nacelle-cmd-norm[2]</input>
			<traverse>
				<setting>
					<position>0</position>
					<time>0</time>
				</setting>
				<setting>
					<position>1</position>
					<time>0.2</time>
				</setting>
			</traverse>
		</kinematic>

		<aerosurface_scale name="fcs/nacelle-angle-rad[2]">
			<input>fcs/nacelle-cmd-norm-filtered[2]</input>
			<zero_centered>false</zero_centered>
			<domain>
				<min>0</min>
				<max>1</max>
			</domain>
			<range>
				<min>1.65</min>
				<max>0.08</max>
			</range>
			<output>propulsion/engine[2]/pitch-angle-rad</output>
		</aerosurface_scale>

		<kinematic name="fcs/nacelle-cmd-norm-filtered[3]">
			<input>fcs/nacelle-cmd-norm[3]</input>
			<traverse>
				<setting>
					<position>0</position>
					<time>0</time>
				</setting>
				<setting>
					<position>1</position>
					<time>0.2</time>
				</setting>
			</traverse>
		</kinematic>

		<aerosurface_scale name="fcs/nacelle-angle-rad[3]">
			<input>fcs/nacelle-cmd-norm-filtered[3]</input>
			<zero_centered>false</zero_centered>
			<domain>
				<min>0</min>
				<max>1</max>
			</domain>
			<range>
				<min>1.65</min>
				<max>0.08</max>
			</range>
			<output>propulsion/engine[3]/pitch-angle-rad</output>
		</aerosurface_scale>
	</channel>
</flight_control>

<aerodynamics file="kentavros-aero.xml"/>

</fdm_config>
